*Heading
** Job name: Job-7 Model name: Model-10
** Generated by: Abaqus/CAE 6.14-1
*Preprint, echo=NO, model=NO, history=NO, contact=NO
** ----------------------------------------------------------------
**
** PART INSTANCE: RC-1
**
*Node
      1,  -798.448914,  -52.7038651,     145.7034
      2,  -856.713623,  -60.8953171,     145.7034
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*Element, type=C3D4
   1,  467,  412, 1055,  893
   2,  467,  631,  412,  893
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*Nset, nset=RC-1_Set-All-Material, generate
    1,  4758,     1
*Elset, elset=RC-1_Set-All-Material, generate
     1,  15266,      1
** Section: Section-Steel
*Solid Section, elset=RC-1_Set-All-Material, material=Material-1
,
*System
*Nset, nset=Set-2
   48,   49,   76,   77,   99,  100
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*Elset, elset=Set-2
   42,   43,   44,   45,   83,   84
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*Nset, nset=Set-Symmetry
   52,   55,   59,   61,   76,   77
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*Elset, elset=Set-Symmetry
   255,   259,   260,   262,   263,   264
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*Elset, elset=_Surf-pressure_S1
    16,    18,    48,    49,    52,    56
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*Elset, elset=_Surf-pressure_S2
    17,    57,    97,   174,   199,   229
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*Elset, elset=_Surf-pressure_S4
    21,    54,    93,    94,   179,   181
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*Elset, elset=_Surf-pressure_S3
   285,   298,   363,   370,   565,   614
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*Surface, type=ELEMENT, name=Surf-pressure
_Surf-pressure_S1, S1
_Surf-pressure_S2, S2
_Surf-pressure_S4, S4
_Surf-pressure_S3, S3
**
** MATERIALS
**
*Material, name=Material-1
*Density
 7.89e-09,
*Elastic
 2.1e+08, 0.3
** ----------------------------------------------------------------
**
** STEP: Step-1
**
*Step, name=Step-1, nlgeom=YES, inc=1000
*Static, stabilize=0.0002, allsdtol=0.05, continue=NO
0.01, 1., 1e-05, 0.01
**
** BOUNDARY CONDITIONS
**
** Name: BC-1 Type: Symmetry/Antisymmetry/Encastre
*Boundary
Set-Symmetry, ZSYMM
** Name: BC-2 Type: Symmetry/Antisymmetry/Encastre
*Boundary
Set-2, ENCASTRE
**
** LOADS
**
** Name: Load-Gravity   Type: Gravity
*Dload
, GRAV, 9810., 0., -1., 0.
** Name: Load-Pressure   Type: Pressure
*Dsload
Surf-pressure, P, 0.5
**
** OUTPUT REQUESTS
**
*Restart, write, frequency=0
**
** FIELD OUTPUT: F-Output-1
**
*Output, field, variable=PRESELECT
**
** HISTORY OUTPUT: H-Output-1
**
*Output, history, variable=PRESELECT
*End Step
