*Heading
** Job name: fibo3 Model name: Fibo-2
** Generated by: Abaqus/CAE 6.14-1
*Preprint, echo=NO, model=NO, history=NO, contact=NO
**
** PARTS
**
*Part, name=PART-1
*Node
      1,           0.,   3.69000006,           0.
      2,           0.,   3.49000001,           0.
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*Element, type=C3D8
  1,   39,   29,   30,   40,   16,    6,    7,   17
  2,   31,   24,   39,   40,    8,    1,   16,   17
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*Elset, elset=Set-All, generate
   1,  976,    1
** Section: Section-1
*Solid Section, elset=Set-All, material=STEEL
,
*End Part
**
**
** ASSEMBLY
**
*Assembly, name=Assembly
**
*Instance, name=PART-1-1, part=PART-1
*End Instance
**
*Nset, nset=Set-1, instance=PART-1-1, generate
 1404,  1426,     1
*Nset, nset=Set-2, instance=PART-1-1
 1,
*End Assembly
**
** MATERIALS
**
*Material, name=STEEL
*Density
 8.7e-09,
*Elastic
 2.1e+08, 0.3
**
** BOUNDARY CONDITIONS
**
** Name: BC-1 Type: Symmetry/Antisymmetry/Encastre
*Boundary
Set-1, ENCASTRE
** ----------------------------------------------------------------
**
** STEP: Step-1
**
*Step, name=Step-1, nlgeom=YES, inc=1000
*Static, stabilize=0.0002, allsdtol=0.05, continue=NO
0.01, 1., 1e-05, 0.01
**
** LOADS
**
** Name: Load-1   Type: Concentrated force
*Cload
Set-2, 1, 0.5
**
** OUTPUT REQUESTS
**
*Restart, write, frequency=0
**
** FIELD OUTPUT: F-Output-1
**
*Output, field, variable=PRESELECT
**
** HISTORY OUTPUT: H-Output-1
**
*Output, history, variable=PRESELECT
*End Step
